// SBML level 2 version 1

model hhsa_1952()
  // hodgkin-huxley squid-axon 1952
  // This model originates from BioModels Database: A Database of Annotated Published Models. It is copyright (c) 2005-2008 The BioModels Team.
  // For more information see the terms of use.

  // Compartments:
  compartment unit_compartment;

  // Parameters:
  V = -75; V is "transmembrane voltage";
  I = 0; I is "applied current";
  var i_Na; i_Na is "sodium current";
  var i_K; i_K is "potassium current";
  var i_L; i_L is "leakage current";
  m = 0.05 dimensionless; m is "sodium channel activation coefficient";
  h = 0.6 dimensionless; h is "sodium channel inactivation coefficient";
  n = 0.325 dimensionless; n is "potassium channel activation coefficient";
  E_R = -75; E_R is "resting membrane potential";
  Cm = 1; Cm is "membrane capacitance";
  g_Na = 120; g_Na is "maximum sodium channel conductance";
  g_K = 36; g_K is "maximum potassium channel conductance";
  g_L = 0.3; g_L is "maximum leakage conductance";
  var E_Na; E_Na is "sodium equilibrium potential";
  var E_K; E_K is "potassium equilibrium potential";
  var E_L; E_L is "leakage equilibrium potential";
  var alpha_m; alpha_m is "auxiliary alpha_m";
  var beta_m; beta_m is "auxiliary beta_m";
  var alpha_h; alpha_h is "auxiliary alpha_h";
  var beta_h; beta_h is "auxiliary beta_h";
  var alpha_n; alpha_n is "auxiliary alpha_n";
  var beta_n; beta_n is "auxiliary beta_n";

  // Assignment rules:
  // E_Na = E_R + 115.0
  E_Na := E_R + 115;
  // E_K = E_R + 12.0
  E_K := E_R - 12;
  // E_L = E_R + 10.613
  E_L := E_R + 10.613;
  // alpha_m = 0.1 * (V + 25.0)/(exp[0.1 * (V + 25.0)] - 1.0)
  alpha_m := 0.1*(V + 25)/(exp(0.1*(V + 25)) - 1);
  // beta_m = 4.0 * exp[V / 18.0]
  beta_m := 4*exp(V/18);
  // alpha_h = 0.07 * exp[V / 20.0]
  alpha_h := 0.07*exp(V/20);
  // beta_h = 1.0 /(exp[0.1 * (V + 30.0)] + 1.0)
  beta_h := 1/(exp(0.1*(V + 30)) + 1);
  // alpha_n = 0.01 * (V + 10.0)/(exp[0.1 * (V + 10.0)] - 1.0)
  alpha_n := 0.01*(V + 10)/(exp(0.1*(V + 10)) - 1);
  // beta_n = 0.125 * exp[V / 80.0]
  beta_n := 0.125*exp(V/80);
  // i_Na = g_Na * m^3.0 * h * (V - E_Na)
  i_Na := g_Na*m^3*h*(V - E_Na);
  // i_K = g_K * n^4.0 * (V - E_K)
  i_K := g_K*n^4*(V - E_K);
  // i_L = g_L * (V - E_L)
  i_L := g_L*(V - E_L);

  // Rate rules:
  // dm/dt = alpha_m * (1.0 - m) - beta_m * m
  m' = alpha_m*(1 - m) - beta_m*m;
  // dh/dt = alpha_h * (1.0 - h) - beta_h * h
  h' = alpha_h*(1 - h) - beta_h*h;
  // dn/dt = alpha_n * (1.0 - n) - beta_n * n
  n' = alpha_n*(1 - n) - beta_n*n;
  // dV/dt = (I - (i_Na + i_K + i_L))/Cm
  V' = (I - (i_Na + i_K + i_L))/Cm;

  // Unit definitions:
  unit time = 1e-3 second; time is "millisecond";
end
