// SBML level 2 version 1

model Kinetic_modelling_of_Amadori_degradation()
  // Martins2003_AmadoriDegradation
  // Model tested in Jarnac.
  // This model originates from BioModels Database: A Database of Annotated Published Models. It is copyright (c) 2005-2006 The BioModels Team.
  // For more information see the terms of use.

  // Compartments:
  compartment compartment = 1;

  // Species:
  species DFG in compartment = 9;
  species E1 in compartment = 0;
  species E2 in compartment = 0;
  species Cn in compartment = 0;
  species Gly in compartment = 0;
  species _3DG in compartment = 0;
  species FA in compartment = 0;
  species _1DG in compartment = 0;
  species AA in compartment = 0;
  species Man in compartment = 0;
  species Glu in compartment = 0;
  species MG in compartment = 0;
  species Mel in compartment = 0;
  species Fru in compartment = 0;

  // Reactions:
  v1: DFG => E1; k1*DFG;
    k1 = 0.0057;
  v2: DFG => E2; k2*DFG;
    k2 = 0.0156;
  v3: DFG => Gly + Cn; k3*DFG;
    k3 = 0.0155;
  v4: E1 => Gly + _3DG; k4*E1;
    k4 = 0.0794;
  v5: _3DG => Cn; k5*_3DG;
    k5 = 0.0907;
  v6: _3DG => FA; k6*_3DG;
    k6 = 0.0274;
  v7: E2 => Gly + _1DG; k7*E2;
    k7 = 0.2125;
  v8: _1DG => Cn; k8*_1DG;
    k8 = 0;
  v9: _1DG => AA; k9*_1DG;
    k9 = 1.9085;
  v10: E1 => Gly + Man; k10*E1;
    k10 = 0.0707;
  v11: E1 => Gly + Glu; k11*E1;
    k11 = 0.1131;
  v12: Man => Glu; k12*Man;
    k12 = 0.0008;
  v13: Glu => _3DG; k13*Glu;
    k13 = 0.0022;
  v14: Gly + Cn => Mel; k14*Cn*Gly;
    k14 = 0.0034;
  v15: Cn => AA + FA + MG; k15*Cn;
    k15 = 0.0159;
  v16: E2 => Gly + Fru; k16*E2;
    k16 = 0.0134;

  // Unit definitions:
  unit substance = 1e-6 mole; substance is "micromole (default)";
  unit time = 60 second; time is "minute (default)";
end
